*Heading
** Job name: Job-iga-nonlinear-displacement Model name: fangban-345-5mm6mm-gongzhuang-Copy
** Generated by: Abaqus/CAE 2024
*Preprint, echo=NO, model=NO, history=NO, contact=NO
**
** PARTS
**
*Part, name=Part-6
*Node
1, 325, -50, -900
2, 325, 1.56783107160537, -850
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*Element, type=S4R
 1,   82,   83, 1981, 1978
 2,   83,    1,   69, 1981
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*Nset, nset=Set-9
    33,    34,    35,    36,    45,    48
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*Elset, elset=Set-9
 11238, 11239, 11240, 11241, 11242, 11243
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*Nset, nset=Set-10
    37,    38,    53,    55,    57,    59
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*Elset, elset=Set-10, generate
 13568,  14447,      1
*Nset, nset=Set-11
    41,    43,    46,    51,    62,    63
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*Elset, elset=Set-11, generate
 10358,  11237,      1
*Nset, nset=Set-12
     2,     3,     5,     6,     8,     9
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*Elset, elset=Set-12
  4019,  4020,  4021,  4022,  4023,  4024
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*Nset, nset=Set-5
    1,    3,    4,    6,    7,    9
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*Elset, elset=Set-5, generate
  371,  4018,     1
*Nset, nset=Set-6
    1,    2,    3,    4,    5,    6
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*Elset, elset=Set-6, generate
   1,  370,    1
** Section: Section-6mm
*Shell Section, elset=Set-6, material=steel
6., 5
** Section: Section-30mm
*Shell Section, elset=Set-5, material=steel
30., 5
** Section: Section-4point5mm
*Shell Section, elset=Set-12, material=steel
4.5, 5
** Section: Section-5point5mm
*Shell Section, elset=Set-11, material=steel
5.5, 5
** Section: Section-4point5mm
*Shell Section, elset=Set-9, material=steel
4.5, 5
** Section: Section-5point5mm
*Shell Section, elset=Set-10, material=steel
5.5, 5
*End Part
**
**
** ASSEMBLY
**
*Assembly, name=Assembly
**
*Instance, name=Part-6-1, part=Part-6
*End Instance
**
*Node
      1,           0.,          15.,          30.
*Nset, nset=Set-6, instance=Part-6-1
    1,    3,    4,    6,    7,    9
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*Elset, elset=Set-6, instance=Part-6-1, generate
  371,  2194,     1
*Nset, nset=Set-7
 1,
*Nset, nset=Set-8, instance=Part-6-1
   10,   12,   13,   15,   16,   18
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*Elset, elset=Set-8, instance=Part-6-1, generate
 2195,  4018,     1
*Nset, nset=m_Set-5
 1,
*Elset, elset=_Surf-12_SPOS, internal, instance=Part-6-1, generate
 2195,  4018,     1
*Surface, type=ELEMENT, name=Surf-12
_Surf-12_SPOS, SPOS
*Elset, elset=_s_Surf-13_SPOS, internal, instance=Part-6-1, generate
 2195,  4018,     1
*Surface, type=ELEMENT, name=s_Surf-13
_s_Surf-13_SPOS, SPOS
** Reference-point monitor and rigid loaded-end coupling
*Node
900000, 0, 15, 0
*Nset, nset=RP_LOAD
900000,
*Surface, type=NODE, name=LOAD_END_NODES
Set-8,
*Coupling, constraint name=RP_LOAD_END, ref node=RP_LOAD, surface=LOAD_END_NODES
*Kinematic
1, 6
*End Assembly
**
** MATERIALS
**
*Material, name=steel
*Density
 7.89e-09,
*Elastic
206000., 0.3
*Plastic
345.,0.
*Material, name=steel-Copy
*Density
 7.89e-09,
*Elastic
206000., 0.3
*Plastic
450.,0.
** ----------------------------------------------------------------
**
** STEP: Step-1
**
*Step, name=Step-1, nlgeom=YES, inc=1000
*Static
0.002, 1., 1e-08, 0.02
**
** BOUNDARY CONDITIONS
**
** Name: BC-1 Type: Symmetry/Antisymmetry/Encastre
*Boundary
Set-6, ENCASTRE
** Name: BC-2 Type: Displacement/Rotation
*Boundary
RP_LOAD, 1, 1
RP_LOAD, 2, 2
RP_LOAD, 3, 3, -5
RP_LOAD, 4, 4
RP_LOAD, 5, 5
RP_LOAD, 6, 6
**
** OUTPUT REQUESTS
**
*Restart, write, frequency=10
**
** FIELD OUTPUT: F-Output-1
**
*Output, field, variable=PRESELECT, frequency=1
**
** HISTORY OUTPUT: H-Output-1
**
*Output, history, variable=PRESELECT
*Node Output, nset=RP_LOAD
U, UR, RF, RM
*End Step
