*Heading
** Job name: Job-45 Model name: kaikou-shiyan-buckleimperfection
** Generated by: Abaqus/CAE 2024
*Preprint, echo=NO, model=NO, history=NO, contact=NO
** ----------------------------------------------------------------
**
** PART INSTANCE: Part-3-2
**
*Node
      1,        -450.,           0.,        -375.
      2,        -200.,           0.,        -375.
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*Element, type=S4R
 1,   1,  33, 265,  54
 2,  33,  34, 266, 265
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*Nset, nset=Part-3-2_Set-7
   1,   4,   5,  30,  31,  32
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*Elset, elset=Part-3-2_Set-7, generate
 427,  464,    1
*Nset, nset=Part-3-2_Set-8
   8,   9,  11,  14,  24,  25
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*Elset, elset=Part-3-2_Set-8, generate
 289,  326,    1
*Nset, nset=Part-3-2_Set-9
   1,   2,   3,   4,   5,   6
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*Elset, elset=Part-3-2_Set-9
   1,   2,   3,   4,   5,   6
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*Nset, nset=Part-3-2_Set-10
   2,   3,   6,   7,  10,  12
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*Elset, elset=Part-3-2_Set-10
 327, 328, 329, 330, 331, 332
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** Section: Section-4mm
*Shell Section, elset=Part-3-2_Set-9, material=steel-NEW, offset=SNEG
4.5, 5
** Section: Section-6mm
*Shell Section, elset=Part-3-2_Set-8, material=steel-NEW, offset=SNEG
5.5, 5
** Section: Section-4mm
*Shell Section, elset=Part-3-2_Set-10, material=steel-NEW
4.5, 5
** Section: Section-6mm
*Shell Section, elset=Part-3-2_Set-7, material=steel-NEW, offset=SPOS
5.5, 5
*System
*Node
    557,           0.,          50.,           0.
*Nset, nset=Set-1
  13,  14,  18,  20,  21,  25
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*Nset, nset=Set-2
   3,   4,   9,  10,  16,  23
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*Nset, nset=_PickedSet37
557,
*Nset, nset=_PickedSet42
557,
*Surface, type=NODE, name=Set-2_CNS_
Set-2, 1.
** Constraint: Constraint-1
*Coupling, constraint name=Constraint-1, ref node=_PickedSet37, surface=Set-2_CNS_
*Kinematic
*Amplitude, name=Amp-1
             0.,              0.,              1.,              1.
**
** MATERIALS
**
*Material, name=steel-NEW
*Density
 7.89e-09,
*Elastic
188920., 0.3
*Plastic
  268.48,         0.
 274.598, 0.00133179
 280.251, 0.00194973
 281.621,  0.0120713
 308.124,  0.0192755
 328.118,  0.0241691
 346.751,  0.0295511
 364.322,  0.0354144
 381.909,  0.0423184
 400.769,  0.0511637
 418.352,  0.0610219
  433.67,  0.0714987
** ----------------------------------------------------------------
**
** STEP: Step-1
**
*IMPERFECTION, file=Job-44, step=1
1, 5,
*Step, name=Step-1, nlgeom=YES
*Static
1., 1., 1e-05, 1.
**
** BOUNDARY CONDITIONS
**
** Name: BC-1 Type: Symmetry/Antisymmetry/Encastre
*Boundary
Set-1, ENCASTRE
** Name: BC-2 Type: Displacement/Rotation
*Boundary, amplitude=Amp-1
_PickedSet42, 1, 1
_PickedSet42, 2, 2
_PickedSet42, 3, 3, -2.
_PickedSet42, 4, 4
_PickedSet42, 5, 5
_PickedSet42, 6, 6
**
** OUTPUT REQUESTS
**
*Restart, write, frequency=0
**
** FIELD OUTPUT: F-Output-1
**
*Output, field, variable=PRESELECT, number interval=100
**
** HISTORY OUTPUT: H-Output-1
**
*Output, history, variable=PRESELECT
*End Step
