*Heading
IGAforCAD multipatch Nitsche buckling alignment reference
*Node
1, 0, 0, 0
2, 2.5, 0, 0
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*Element, type=S4R, elset=EALL
1, 1, 2, 83, 82
2, 2, 3, 84, 83
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*Nset, nset=ROOT
1, 82, 163, 244, 325, 406
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*Nset, nset=RIGHT
81, 162, 243, 324, 405, 486
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*Node, nset=RP
3322, 200, 50, 0.0
*Surface, type=NODE, name=RIGHT_SURFACE
RIGHT, 1.0
*Coupling, constraint name=RIGHT_RBE2, ref node=RP, surface=RIGHT_SURFACE
*Kinematic
1, 6
*Material, name=STEEL
*Elastic
206000, 0.29999999999999999
*Plastic
1000000000, 0.0
*Shell Section, elset=EALL, material=STEEL
1, 5
*Step, name=COMPRESSION, nlgeom=YES, inc=200
*Static, direct
0.025, 1.0
*Boundary
ROOT, 1, 6, 0.0
RP, 2, 6, 0.0
RP, 1, 1, -0.20000000000000001
*Output, field, frequency=1
*Node Output
U, RF
*Element Output, directions=YES, allsectionpts
S, PEEQ
*End Step
