*Heading
IGAforCAD same-parent-imperfection trimmed trapezoid ultimate reference
*Preprint, echo=NO, model=NO, history=NO, contact=NO
*Node
1, 0, 0, 0
2, 0.625, 0, 0
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*Element, type=S4R, elset=EALL
1, 1, 2, 163, 162
2, 2, 3, 164, 163
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*Nset, nset=ROOT
1, 162, 323, 484, 645, 806
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*Nset, nset=RIGHT
161, 322, 483, 644, 805, 966
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*Node, nset=RP
25922, 100, 50, 0
*Surface, type=NODE, name=RIGHT_SURFACE
RIGHT, 1.0
*Coupling, constraint name=RIGHT_RBE2, ref node=RP, surface=RIGHT_SURFACE
*Kinematic
1, 6
*Material, name=STEEL
*Elastic
206000, 0.3
*Plastic
235, 0
1235, 1
*Shell Section, elset=EALL, material=STEEL
1, 5
*Boundary
ROOT, 1, 6, 0.
RP, 2, 2, 0.
RP, 3, 3, 0.
RP, 4, 4, 0.
RP, 5, 5, 0.
RP, 6, 6, 0.
*Step, name=COMPRESSION, nlgeom=YES, inc=10000
*Static
0.0025000000000000001, 1., 1e-08, 0.0050000000000000001
*Boundary
RP, 1, 1, -2
*Output, field, frequency=1
*Node Output
U, UR, RF, RM
*Element Output, directions=YES
S, LE, PEEQ
*End Step
